folder simulations: version=37; creator=Apsim 7.10-r4221
  simulation Rotation Sample
    metfile met: filename=E:\A_data\p0-1-24-25.met
    clock
      start_date = 01/10/2024  # Enter the start date of the simulation
      end_date = 30/12/2025  # Enter the end date of the simulation
    summaryfile
    area paddock
      cotton
      Soil: SoilType=Clay loam; Site=Generic-Vic; State=Generic; Country=Australia; ApsoilNumber=500-GENERIC; Latitude=-35.980698; Longitude=142.917341; LocationAccuracy=Regional Soil Type; YearOfSampling=0; Comments=Generic soil.
        DataSource=Generic soil. Based on Soil Characterisation undertaken by Birchip Cropping Group during period 2002-2005
        Water
          Thickness  BD     AirDry  LL15   DUL    SAT
          100        1.36   0.036   0.072  0.205  0.335
          100        1.293  0.03    0.06   0.196  0.361
          100        1.293  0.0335  0.067  0.189  0.371
          100        1.374  0.035   0.07   0.192  0.319
          100        1.374  0.035   0.07   0.2    0.33
          100        1.38   0.036   0.072  0.202  0.33
          100        1.38   0.036   0.072  0.205  0.328
          100        1.39   0.037   0.074  0.206  0.326
          100        1.39   0.037   0.074  0.207  0.324
          100        1.4    0.038   0.076  0.208  0.322
          100        1.4    0.038   0.076  0.209  0.32
          100        1.41   0.039   0.078  0.21   0.318
          100        1.41   0.039   0.078  0.212  0.317
          100        1.42   0.04    0.08   0.213  0.316
          100        1.42   0.04    0.08   0.214  0.315
          100        1.43   0.041   0.082  0.215  0.314
          LL15 source: Estimated based on local knowledge (layer 1, 2, 3, 4, 5)
          DUL source: Field measured and checked for sensibility (layer 1, 2, 3, 4, 5)
          SAT source: Calculated from measured, estimated or calculated BD (layer 1, 2, 3, 4, 5)
          SoilCrop wheat
            LL=[0.072, 0.06, 0.067, 0.07, 0.07, 0.072, 0.072, 0.074, 0.074, 0.076, 0.076, 0.078, 0.078, 0.08, 0.08, 0.082]
            KL=[0.06, 0.06, 0.06, 0.04, 0.04, 0.035, 0.035, 0.03, 0.03, 0.025, 0.02, 0.02, 0.018, 0.015, 0.012, 0.01]
            XF=[1, 1, 1, 1, 1, 1, 1, 1, 1, 1, 0.9, 0.9, 0.9, 0.8, 0.8, 0.8]
          SoilCrop maize
            LL=[0.072, 0.06, 0.067, 0.07, 0.07, 0.072, 0.072, 0.074, 0.074, 0.076, 0.076, 0.078, 0.078, 0.08, 0.08, 0.082]
            KL=[0.08, 0.06, 0.06, 0.04, 0.04, 0.035, 0.035, 0.03, 0.03, 0.025, 0.02, 0.02, 0.018, 0.015, 0.012, 0.01]
            XF=[1, 1, 1, 1, 1, 1, 1, 1, 1, 1, 0.9, 0.9, 0.9, 0.8, 0.8, 0.8]
        SoilWater: SummerCona=3.5; SummerU=6; SummerDate=1-Nov; WinterCona=2; WinterU=2; WinterDate=1-Apr; DiffusConst=88; DiffusSlope=35; Salb=0.13; CN2Bare=73; CNRed=20; CNCov=0.8
          Thickness  SWCON  MWCON  KLAT
          100        0.45   0.4    0.03
          100        0.45   0.4    0.03
          100        0.4    0.3    0.03
          100        0.4    0.3    0.03
          100        0.4    0.3    0.03
          100        0.4    0.3    0.03
          100        0.38   0.3    0.02
          100        0.38   0.3    0.02
          100        0.35   0.3    0.02
          100        0.35   0.3    0.02
          100        0.3    0.3    0.01
          100        0.3    0.3    0.01
          100        0.3    0.3    0.01
          100        0.25   0.3    0.01
          100        0.25   0.3    0.01
          100        0.25   0.3    0.01
        SoilOrganicMatter: RootCN=40; RootWt=1000; SoilCN=12; EnrACoeff=7.4; EnrBCoeff=0.2; OCUnits=WalkleyBlack
          Thickness  OC   FBiom  FInert
          100        1    0.03   0.4
          150        0.5  0.02   0.6
          150        0.5  0.02   0.7
          150        0.5  0.02   0.8
          150        0.5  0.01   0.9
          300        0.5  0.01   0.9
          300        0.5  0.01   1
          300        0.5  0.01   1
          OC source: Estimated based on local knowledge
        Analysis: PHUnits=Water; BoronUnits=HotWater
          Thickness  Texture    PH
          100        Clay loam  7
          150        -          7
          150        -          7
          150        -          7
          150        -          7
          300        -          7
          300        -          7
          300        -          -
          Texture source: Unknown source or quality of data (layer 1)
        InitialWater: FractionFull=0.75; PercentMethod=FilledFromTop; RelativeTo=ll15
        Sample InitialNitrogen: NO3Units=ppm; NH4Units=ppm; SWUnits=Volumetric; OCUnits=Total; PHUnits=Water
          Thickness  NO3  NH4
          100        12   3
          150        10   2
          150        8    1.5
          150        6    1
          150        5    1
          300        4    0.8
          300        3    0.5
          300        2    0.5
      folder Manager folder
        rotplot Rotation Management: canvas_height=566; rules_height=336; graph_name=stateGraph; language=C#; detailedLogging=no
          node maize
          node wheat
          arc arc0: source=wheat; target=maize; actions=Wheat Management.Leave; rules=Wheat Management.canLeave
          arc arc1: source=maize; target=wheat; actions=Maize Management.Leave; rules=Maize Management.canLeave
          arc arc2: source=maize; target=maize; actions=Maize Management.Enter; rules=Maize Management.canEnter
          arc arc3: source=wheat; target=wheat; actions=Wheat Management.Enter; rules=Wheat Management.canEnter
          paddock: isManaged=True; initialState=wheat
          component Rotation Management_: executable=%apsim%/Model/Manager2.dll
            initdata
              text:
                using System;
                using System.Collections.Generic;
                using System.Dynamic;
                using System.Text;
                using ModelFramework;
                using CSGeneral;
                public class Script {
                [Link] public Simulation MySimulation;
                private List<string> paddocks = new List<string>();
                private List<dynamic> paddockStates = new List<dynamic>();
                private Graph g = new Graph();
                private Dictionary<string,string> _currentState = new Dictionary<string,string>();
                [Output, Description("Current State of DG")] public string currentState {
                  get {string[] r = new string[_currentState.Count]; _currentState.Values.CopyTo(r,0);
                       return(String.Join(" ", r));}
                }
                private void setState(string p, string s) {
                  _currentState[p] = s;
                }
                private string getState(string p) {
                  return(_currentState[p]);
                }
                [Output, Description("Current paddock")] public string currentPaddock = "";
                [Output] public string [] states = new string[0];
                [EventHandler] public void OnInitialised()
                {
                g = new Graph();
                states = new string[2];
                int i = 0;
                g.AddNode("maize");
                states[i++] = "maize";
                g.AddNode("wheat");
                states[i++] = "wheat";
                ruleAction arc0 = new ruleAction();
                arc0.testCondition.Add("Wheat Management.canLeave");
                arc0.action.Add("Wheat Management.Leave");
                g.AddDirectedEdge("wheat","maize",arc0);
                ruleAction arc1 = new ruleAction();
                arc1.testCondition.Add("Maize Management.canLeave");
                arc1.action.Add("Maize Management.Leave");
                g.AddDirectedEdge("maize","wheat",arc1);
                ruleAction arc2 = new ruleAction();
                arc2.testCondition.Add("Maize Management.canEnter");
                arc2.action.Add("Maize Management.Enter");
                g.AddDirectedEdge("maize","maize",arc2);
                ruleAction arc3 = new ruleAction();
                arc3.testCondition.Add("Wheat Management.canEnter");
                arc3.action.Add("Wheat Management.Enter");
                g.AddDirectedEdge("wheat","wheat",arc3);
                string title;
                MySimulation.Get("title", out title);
                }
                [Link] public Component MySelf;
                [Input] public DateTime Today;
                [EventHandler] public void OnEnd_Simulation()
                {
                }
                [EventHandler] public void OnStart_Simulation()
                {
                paddocks.Add("paddock");
                setState("paddock","wheat");
                   MySimulation.Publish("transition");
                }
                [Output] public string paddock_state {get {return(getState("paddock"));}}
                private string modname(string x) {
                  if (x.Contains(".")) return(x.Split('.')[0]);
                  return("");
                }
                private string varname(string x) {
                  if (x.Contains(".")) return(x.Split('.')[1]);
                  return(x);
                }
                [EventHandler] public void OnProcess()
                {
                   bool more = true;
                   while (more) {
                      more = false;
                      double bestScore = -1.0; string bestArc = ""; string bestPaddock = "";
                      foreach (string p in paddocks) {
                         Node s = g.FindNode(getState(p));
                         // Console.WriteLine(" state=" + s.Name);
                         foreach (string _arc in s.arcs.Keys) {
                            double score = 1;
                            foreach (string testCondition in s.arcs[_arc].testCondition){
                               double c = 0.0;
                               currentPaddock = p;
                               if (MySimulation.Get(testCondition, out c))
                                  score *= c;
                               else
                                  throw new Exception("Nothing returned from expression '" + testCondition + "'");
                               //Console.WriteLine(" p=" + p +" a=" + _arc + "cond=" + testCondition + " score=" + score);
                            }
                            if (score > bestScore) {
                               bestScore = score;
                               bestArc = _arc;
                               bestPaddock = p;
                            }
                         }
                      }
                      currentPaddock = "";
                      if (bestScore > 0.0) {
                         Node s = g.FindNode(getState(bestPaddock));
                         if( bestPaddock != "")
                            currentPaddock = bestPaddock;
                         if (getState(bestPaddock) != "") MySimulation.Publish("transition_from_" + getState(bestPaddock));
                         MySimulation.Publish("transition");
                         setState (bestPaddock, g.FindArcTarget(bestArc));
                         foreach (string action in s.arcs[bestArc].action ) {
                            try {MySimulation.Publish(action);} catch (Exception e) {Console.WriteLine("Error publishing '" + action + "' to the system"); throw (e);}
                            //Console.WriteLine(" best=" + bestPaddock + " action=" + action);
                         }
                         MySimulation.Publish("transition_to_" + getState(bestPaddock));
                         more = true;
                      }
                   }
                }
                  public class ruleAction
                  {
                     public string Target;
                     public List<string> testCondition = new List<string>();
                     public List<string> action = new List<string>();
                  }
                   public class Node : IEquatable<Node>
                   {
                      private string data /*, alias*/;
                      public Node(string _data) { data = _data; }
                      public Dictionary<string, ruleAction> arcs = new Dictionary<string, ruleAction>();
                      public bool Equals(Node other)
                      {
                         return ( this.data == other.data );
                      }
                      public string Name { get { return (data); } }
                   }

                   class Graph
                   {
                      public List<Node> vertices;
                      public void print() {
                         foreach (Node n in vertices) {
                            Console.WriteLine(n.Name + ":");
                            foreach (string k in n.arcs.Keys) {
                               Console.WriteLine("  " + k);
                            }
                         }
                      }
                      public Graph() { vertices = new List<Node>(); }
                      public Node AddNode(Node node)
                      {
                         if (vertices.Find(delegate(Node n) { return (n.Equals(node)); }) == null)
                            vertices.Add(node);
                         return (vertices.Find(delegate(Node n) { return (n.Equals(node)); }));
                      }
                      public Node AddNode(string value)
                      {
                         return (AddNode(new Node(value)));
                      }
                      public Node FindNode(string value)
                      {
                         return (FindNode(AddNode(value)));
                      }
                      public Node FindNode(Node node)
                      {
                         return (vertices.Find(delegate(Node n) { return (n.Equals(node)); }));
                      }
                      public void AddDirectedEdge(string source, string dest, ruleAction value)
                      {
                         int i = 0;
                         foreach (Node n in vertices) {
                            foreach (string arc in n.arcs.Keys) {
                               i++;
                            }
                         }
                         Node node1 = AddNode(source);
                         AddNode(dest);
                         value.Target = dest;
                         node1.arcs.Add("arc" + i.ToString(), value);
                      }
                      public string FindArcTarget(string arc)
                      {
                         foreach (Node n in vertices) {
                            foreach (string a in n.arcs.Keys) {
                               if (a == arc) { return (n.arcs[a].Target); }
                            }
                         }
                         Console.WriteLine("Aiee - no target for arc " + arc );
                         return("");
                      }
                   }
                }
        manager2 Wheat Management
          # Crop properties
          crop = wheat  # Name of this crop
          # Sowing criteria
          date1 = 5-Oct  # Enter sowing window START date (dd-mmm)
          date3 = na  # Enter cultivar change date (na if not in use)
          date2 = 31-Dec  # Enter sowing window END date (dd-mmm)
          must_sow = yes
          rain_amount = 10  # Enter amount of cumulative rainfall (mm)
          rain_days = 3  # Enter number of days to accumulate rainfall (days)
          esw_amount = 10  # Enter amount of soil water (mm)
          # Sowing Parameters
          cultivar1 = Jimai70_v6_backoff  # Enter cultivar
          cultivar2 = na  # Enter 2nd Cultivar (na if not using a second cultivar)
          density1 = 250  # Enter sowing density (plants/m2)
          depth1 = 30  # Enter sowing depth (mm)
          row_spacing1 = 250  # Enter row spacing (mm)
          # Extra Parameters
          ftn1 = na  # Enter Fertile Tiller Number (na for auto)
          skiprow1 = solid  # Skip row
          tillageImplement = na  # Name of tillage implement (na if not in use)
```csharp
using System;
using ModelFramework;
using CSGeneral;

// Basic crop management: sowing & harvesting.
// Multi-paddock aware.
// This component DOES NOT require a trigger from the sequencer.
// It will assume it is the only crop in the system if it doesnt find a sequencer.
// If it does find a sequencer, it will do nothing until told to (via Enter/Leave).
public class Script 
{      
   [Link()]  public Simulation MySimulation;
   
   [Param()] private string crop;         // The module name of this crop
   [Param()] private string date1;         //Start of sowing window
   [Param()] private string date2;         //End of sowing window
   [Param()] private string date3;         //date to change to different cultivar
   [Param()] int esw_amount;
   [Param()] private string must_sow;

   [Input()] private DateTime today;

   // Rainfall accumulator
   [Param()] int rain_days;              //check for rain over this period
   [Param()] int rain_amount;            //this much rain over that period

   // Daily rainfall from the system
   [Input] private double rain;
   private ManagerUtility.Tracker<double> rainTracker; 

   private bool inWindow = false;
   private bool endOfWindow = false;
   private bool ChangeCultivar = false;

   //initialise tracker, telling it how many days to track
   [EventHandler] public void OnInitialised()
   {
      rainTracker = new ManagerUtility.Tracker<double>(rain_days); 
   }

   // Daily tests common to all paddocks
   [EventHandler] public void OnPrepare()
   {
      bool startOfWindow = DateUtility.DatesEqual(date1, today);

      inWindow = DateUtility.WithinDates(date1, today, date2);
      ChangeCultivar = false;
      if(date3 != "na")  
         ChangeCultivar = DateUtility.WithinDates(date3, today, date2);
      endOfWindow = DateUtility.DatesEqual(date2, today);

      rainTracker.Add(rain);
      string currentPaddock = "";
      if (MySimulation.Get("currentPaddock", out currentPaddock) == false) 
      {
         // If there is no sequencer plugged in then we are it..
         if (canEnter > 0) {
            OnEnter();
         }
         if (canLeave > 0) {
            OnLeave();
         }
      }
   }
   // Test whether we can sow a crop today
   // +ve number - yes
   // 0          - no
   // -ve number - no, out of scope (planting window)
   [Output, Description("Test whether we can sow a crop today")] public int canEnter  {
      get {
         bool isPossibleToday = false;
         
         string currentPaddock;
         MySimulation.Get("currentPaddock", out currentPaddock);
         //Console.WriteLine("1. '" + currentPaddock + "'");

         Component paddockModule;
         if (currentPaddock != "")
            paddockModule = (Component) MySimulation.LinkByName(currentPaddock);
         else
            paddockModule = (Component) MySimulation.ChildPaddocks[0];
         //Console.WriteLine("2. " + paddockModule.Name);

         Component cropModule = (Component) paddockModule.LinkByName( crop );

         //Console.WriteLine("3. " + cropModule.Name);
         string plantStatus = "";
         cropModule.Get("plant_status", out plantStatus);

         double esw = 0.0;
         Component soilModule = (Component) paddockModule.LinkByType("SoilWat");
         soilModule.Get("esw", out esw);
         if (plantStatus == "out" &&
             inWindow &&
             rainTracker.Sum() >= rain_amount &&
             esw > esw_amount) 
         {
             isPossibleToday = true;
         } 

	     if (isPossibleToday)
            return 1;
         
         if (plantStatus == "out" && endOfWindow && must_sow == "yes")
            return 1;

         if (plantStatus == "out" && !inWindow)
            return -1;
         
         return 0;
      }
   }  
   [Output, Description("Test whether we have passed the end of the window")] public int pastWindow  {
      get {
         return( (DateUtility.CompareDates(date2, today) < 0) ? 1 : 0);
      }
   }
   
   // Sow a crop
   [Param()] private string cultivar1;
   [Param()] private string cultivar2;
   [Param()] private double density1;
   [Param()] private double depth1;
   [Param()] private double row_spacing1;
   [Param()] private string ftn1;
   [Param()] private string skiprow1;
   [Param()] private string tillageImplement;
   
   [EventHandler, Description("Sow the crop")] public void OnEnter()
   {
      Console.WriteLine(today + " Sowing Crop");
      SowType data = new SowType();
      data.Cultivar = cultivar1;
      if(ChangeCultivar)
         data.Cultivar = cultivar2;

      data.plants = density1;
      data.sowing_depth = depth1;
      data.row_spacing = row_spacing1;
      data.tiller_no_fertile = (ftn1 == "na") ? "" : ftn1;
      data.SkipRow = 0 ;
      if (skiprow1 == "single")
         data.SkipRow = 1;
      else if (skiprow1 == "double")
         data.SkipRow = 2;

      string currentPaddock;
      MySimulation.Get("currentPaddock", out currentPaddock);
      Component cropModule;
      if (currentPaddock != "")
         cropModule = (Component) MySimulation.LinkByName(currentPaddock + "." + crop);
      else 
         cropModule = (Component) MySimulation.ChildPaddocks[0].LinkByName(crop);

      cropModule.Publish("Sow", data);
      if (tillageImplement.ToLower() != "na") 
	  {
         TillageType t = new TillageType();
         t.type = tillageImplement;
         Component paddockModule;
         if (currentPaddock != "")
            paddockModule = (Component) MySimulation.LinkByName(currentPaddock);
         else
            paddockModule = MySimulation.ChildPaddocks[0];
         paddockModule.Publish("tillage", t);
      }		 
   }

   // Test whether we can harvest a crop today
   // +ve number - yes
   // 0          - no
   // -ve        - out of scope
   [Output] public int canLeave  
   {
      get 
      {
         string currentPaddock;
         MySimulation.Get("currentPaddock", out currentPaddock);

         string plantStatus = "";
         MySimulation.Get((currentPaddock != "" ? currentPaddock + "." : "") + crop + ".plant_status", out plantStatus);
         if (plantStatus == "out")
            return -1;

         string StageName = "";
         MySimulation.Get((currentPaddock != "" ? currentPaddock + "." : "") + crop + ".StageName", out StageName);
         if (StageName == "harvest_ripe" || plantStatus == "dead")
            return 1;
         return 0;
      }
   }

   [EventHandler] public void OnLeave()
   {
      Console.WriteLine(today + " Harvesting Crop");
      HarvestType hdata = new HarvestType();
      hdata.Remove = 0.0;
      string currentPaddock;
      MySimulation.Get("currentPaddock", out currentPaddock);
      Component cropModule;
      if (currentPaddock != "")
         cropModule = (Component) MySimulation.LinkByName(currentPaddock + "." + crop);
      else 
         cropModule = (Component) MySimulation.ChildPaddocks[0].LinkByName(crop);

      cropModule.Publish("harvest", hdata);

      KillCropType kdata = new KillCropType();
      kdata.KillFraction = 0.0F;
      cropModule.Publish("killcrop", kdata);
      cropModule.Publish("end_crop");
   } 
}
```
        manager2 Maize Management
          # Crop properties
          crop = maize  # Name of this crop
          # Sowing criteria
          date1 = 10-Jun  # Enter sowing window START date (dd-mmm)
          date3 = na  # Enter cultivar change date (na if not in use)
          date2 = 20-Jun  # Enter sowing window END date (dd-mmm)
          must_sow = yes
          rain_amount = 25  # Enter amount of cumulative rainfall (mm)
          rain_days = 7  # Enter number of days to accumulate rainfall (days)
          esw_amount = 20  # Enter amount of soil water (mm)
          # Sowing Parameters
          cultivar1 = P01_shandong_2025_v7  # Enter cultivar
          cultivar2 = na  # Enter 2nd Cultivar (na if not using a second cultivar)
          density1 = 7.8  # Enter sowing density (plants/m2)
          depth1 = 50  # Enter sowing depth (mm)
          row_spacing1 = 250  # Enter row spacing (mm)
          # Extra Parameters
          plants_pm1 =  # Enter sowing density (plants/ m row cotton)
          ftn1 = na  # Enter Fertile Tiller Number (na for auto)
          skiprow1 = solid  # Skip row
          tillageImplement = na  # Name of tillage implement (na if not in use)
```csharp
using System;
using ModelFramework;
using CSGeneral;

// Basic crop management: sowing & harvesting.
// Multi-paddock aware.
// This component DOES NOT require a trigger from the sequencer.
// It will assume it is the only crop in the system if it doesnt find a sequencer.
// If it does find a sequencer, it will do nothing until told to (via Enter/Leave).
public class Script 
{      
   [Link()]  public Simulation MySimulation;
   
   [Param()] private string crop;         // The module name of this crop
   [Param()] private string date1;         //Start of sowing window
   [Param()] private string date2;         //End of sowing window
   [Param()] private string date3;         //date to change to different cultivar
   [Param()] int esw_amount;
   [Param()] private string must_sow;

   [Input()] private DateTime today;

   // Rainfall accumulator
   [Param()] int rain_days;              //check for rain over this period
   [Param()] int rain_amount;            //this much rain over that period

   // Daily rainfall from the system
   [Input] private double rain;
   private ManagerUtility.Tracker<double> rainTracker; 

   private bool inWindow = false;
   private bool endOfWindow = false;
   private bool ChangeCultivar = false;

   //initialise tracker, telling it how many days to track
   [EventHandler] public void OnInitialised()
   {
      rainTracker = new ManagerUtility.Tracker<double>(rain_days); 
   }

   // Daily tests common to all paddocks
   [EventHandler] public void OnPrepare()
   {
      bool startOfWindow = DateUtility.DatesEqual(date1, today);

      inWindow = DateUtility.WithinDates(date1, today, date2);
      ChangeCultivar = false;
      if(date3 != "na")  
         ChangeCultivar = DateUtility.WithinDates(date3, today, date2);
      endOfWindow = DateUtility.DatesEqual(date2, today);

      rainTracker.Add(rain);
      string currentPaddock = "";
      if (MySimulation.Get("currentPaddock", out currentPaddock) == false) 
      {
         // If there is no sequencer plugged in then we are it..
         if (canEnter > 0) {
            OnEnter();
         }
         if (canLeave > 0) {
            OnLeave();
         }
      }
   }
   // Test whether we can sow a crop today
   // +ve number - yes
   // 0          - no
   // -ve number - no, out of scope (planting window)
   [Output, Description("Test whether we can sow a crop today")] public int canEnter  {
      get {
         bool isPossibleToday = false;
         
         string currentPaddock;
         MySimulation.Get("currentPaddock", out currentPaddock);
         //Console.WriteLine("1. '" + currentPaddock + "'");

         Component paddockModule;
         if (currentPaddock != "")
            paddockModule = (Component) MySimulation.LinkByName(currentPaddock);
         else
            paddockModule = (Component) MySimulation.ChildPaddocks[0];
         //Console.WriteLine("2. " + paddockModule.Name);

         Component cropModule = (Component) paddockModule.LinkByName( crop );

         //Console.WriteLine("3. " + cropModule.Name);
         string plantStatus = "";
         cropModule.Get("plant_status", out plantStatus);

         double esw = 0.0;
         Component soilModule = (Component) paddockModule.LinkByType("SoilWat");
         soilModule.Get("esw", out esw);
         if (plantStatus == "out" &&
             inWindow &&
             rainTracker.Sum() >= rain_amount &&
             esw > esw_amount) 
         {
             isPossibleToday = true;
         } 

	     if (isPossibleToday)
            return 1;
         
         if (plantStatus == "out" && endOfWindow && must_sow == "yes")
            return 1;

         if (plantStatus == "out" && !inWindow)
            return -1;
         
         return 0;
      }
   }  
   
[Output, Description("Test whether we have passed the end of the window")] public int pastWindow  {
      get {
         return( (DateUtility.CompareDates(date2, today) < 0) ? 1 : 0);
      }
   }   
   // Sow a crop
   [Param()] private string cultivar1;
   [Param()] private string cultivar2;
   [Param()] private string density1;
   [Param()] private string plants_pm1;
   [Param()] private double depth1;
   [Param()] private double row_spacing1;
   [Param()] private string ftn1;
   [Param()] private string skiprow1;
   [Param()] private string tillageImplement;
   
   [EventHandler, Description("Sow the crop")] public void OnEnter()
   {
      Console.WriteLine(today.ToString("dd/MM/yyyy") + " Sowing Crop");
      SowType data = new SowType();
      data.Cultivar = cultivar1;
      if(ChangeCultivar)
         data.Cultivar = cultivar2;

      double density = 0;
      if (! double.TryParse(density1, out density) && density1 != "")
         Console.WriteLine(today.ToString("dd/MM/yyyy") + " Ignoring density parameter \"" + density1 + "\"");

      double plants_pm = 0;
      if (! double.TryParse(plants_pm1, out plants_pm)&& plants_pm1 != "")
         Console.WriteLine(today.ToString("dd/MM/yyyy") + " Ignoring plants_pm parameter \"" + plants_pm1 + "\"");

      data.plants = density;
      data.plants_pm = plants_pm;
      data.sowing_depth = depth1;
      data.row_spacing = row_spacing1;
      data.tiller_no_fertile = (ftn1 == "na") ? "" : ftn1;
      data.SkipRow = 0 ;
      if (skiprow1 == "single")
         data.SkipRow = 1;
      else if (skiprow1 == "double")
         data.SkipRow = 2;

      string currentPaddock;
      MySimulation.Get("currentPaddock", out currentPaddock);
      Component cropModule;
      if (currentPaddock != "")
         cropModule = (Component) MySimulation.LinkByName(currentPaddock + "." + crop);
      else 
         cropModule = (Component) MySimulation.ChildPaddocks[0].LinkByName(crop);

      cropModule.Publish("Sow", data);

      if (tillageImplement.ToLower() != "na") 
	  {
         TillageType t = new TillageType();
         t.type = tillageImplement;
         Component paddockModule;
         if (currentPaddock != "")
            paddockModule = (Component) MySimulation.LinkByName(currentPaddock);
         else
            paddockModule = MySimulation.ChildPaddocks[0];
         paddockModule.Publish("tillage", t);
      }		 
   }

   // Test whether we can harvest a crop today
   // +ve number - yes
   // 0          - no
   // -ve        - out of scope
   [Output] public int canLeave  
   {
      get 
      {
         string currentPaddock;
         MySimulation.Get("currentPaddock", out currentPaddock);

         string plantStatus = "";
         MySimulation.Get((currentPaddock != "" ? currentPaddock + "." : "") + crop + ".plant_status", out plantStatus);
         if (plantStatus == "out")
            return -1;

         string StageName = "";
         MySimulation.Get((currentPaddock != "" ? currentPaddock + "." : "") + crop + ".StageName", out StageName);
         if (StageName == "harvest_ripe" || plantStatus == "dead")
            return 1;
         return 0;
      }
   }

   [EventHandler] public void OnLeave()
   {
      Console.WriteLine(today + " Harvesting Crop");
      HarvestType hdata = new HarvestType();
      hdata.Remove = 0.0;
      string currentPaddock;
      MySimulation.Get("currentPaddock", out currentPaddock);
      Component cropModule;
      if (currentPaddock != "")
         cropModule = (Component) MySimulation.LinkByName(currentPaddock + "." + crop);
      else 
         cropModule = (Component) MySimulation.ChildPaddocks[0].LinkByName(crop);

      cropModule.Publish("harvest", hdata);

      KillCropType kdata = new KillCropType();
      kdata.KillFraction = 0.0F;
      cropModule.Publish("killcrop", kdata);
      cropModule.Publish("end_crop");
   } 
}
```
        manager2 Wheat Sowing Fertiliser
          fertType = Urea_N  # The type of fertiliser
          fertAmt = 175  # Amout of fertiliser to apply (kg/ha)
          # Event details
          ModuleName = wheat  # On which module should the event come from
          EventName = sowing  # On which event should spraying be triggered
```csharp
using System;
using System.Linq;
using System.Collections.Generic;
using ModelFramework;

// Crop management: fertilise at sowing
// Multi-paddock aware.
// This component DOES NOT require a trigger from the sequencer.

public class Script 
{      
   [Link]  public Simulation MySimulation;
   [Param] string fertType;
   [Param] float fertAmt;
   [Param] string ModuleName;
   [Param] string EventName;
   
   [EventHandler] public void OnStart_Simulation()
   {
      foreach (Paddock paddock in MySimulation.ChildPaddocks) 
      {
         foreach (Component child in paddock.Children) {
            if(child.Name == ModuleName){
               RuntimeEventHandler.NullFunction curried = () => OnTrigger(paddock.Name);
               MySimulation.Subscribe(child.FullName + "." + EventName, curried);
               Console.WriteLine("Subscribed '" + child.FullName + "." + EventName + " => " + paddock.Name + "'"); 
            }
         }
      }
   }

   public void OnTrigger(string paddock)
   {
      Console.WriteLine("Fertiliser OnTrigger called, paddock='" + paddock + "'"); 
      if (fertAmt > 0) 
      {         
         Component paddockModule;
         if (paddock != "")
            paddockModule = (Component) MySimulation.LinkByName(paddock);
         else
            paddockModule = (Component) MySimulation.ChildPaddocks[0];
         //Console.WriteLine("2. " + paddockModule.Name);

         Fertiliser fertModule = (Fertiliser) paddockModule.LinkByName("Fertiliser");
         fertModule.Apply(fertAmt, 50, fertType);
      }
   }
}
```
        manager2 Maize Sowing Fertiliser1
          fertType = Urea_N  # The type of fertiliser
          fertAmt = 175  # Amout of fertiliser to apply (kg/ha)
          # Event details
          ModuleName = maize  # On which module should the event come from
          EventName = sowing  # On which event should spraying be triggered
          script: same as in Rotation Sample.paddock.Manager folder.Wheat Sowing Fertiliser
        manager wheat Fertilise in a zadok stage window
          # When should fertiliser be applied
          zadok_fert_stage_begin = 30  # Enter start of zadok window (10-71)
          zadok_fert_stage_end = 32  # Enter end of zadok window (10-71)
          fert_criteria = 1000  # Don't add fertiliser if N in top 2 layers exceeds (kg/ha)
          esw_amount = 50  # Enter amount of soil water (mm)
          # Fertiliser application details
          fertmodule = wheat  # Module used to apply the fertiliser
          fert_amount = 200  # Amount of fertiliser to apply (kg/ha)
          fert_type = urea_N  # Fertiliser type
          on init:
```
            fert_applied[zadok_fert_stage_begin][zadok_fert_stage_end] = 0
```
          on sowing:
```
            fert_applied[zadok_fert_stage_begin][zadok_fert_stage_end] = 0
```
          on start_of_day:
```
         if (zadok_stage >= [zadok_fert_stage_begin]
            AND zadok_stage <= [zadok_fert_stage_end]
            AND fert_applied[zadok_fert_stage_begin][zadok_fert_stage_end] = 0) then
            if (esw >= [esw_amount]) then
               N_topsoil = no3(1) + nh4(1) + no3(2) + nh4(2)
               if (N_topsoil < [fert_criteria]) then
                  [fertmodule] apply amount = [fert_amount] (kg/ha), depth = 50 (mm), type = [fert_type] ()
               fert_applied[zadok_fert_stage_begin][zadok_fert_stage_end] = 1
               endif
            endif
         endif
```
        manager wheat Fertilise in a zadok stage window1
          # When should fertiliser be applied
          zadok_fert_stage_begin = 45  # Enter start of zadok window (10-71)
          zadok_fert_stage_end = 49  # Enter end of zadok window (10-71)
          fert_criteria = 1000  # Don't add fertiliser if N in top 2 layers exceeds (kg/ha)
          esw_amount = 50  # Enter amount of soil water (mm)
          # Fertiliser application details
          fertmodule = wheat  # Module used to apply the fertiliser
          fert_amount = 20  # Amount of fertiliser to apply (kg/ha)
          fert_type = urea_N  # Fertiliser type
          on init:
```
            fert_applied[zadok_fert_stage_begin][zadok_fert_stage_end] = 0
```
          on sowing:
```
            fert_applied[zadok_fert_stage_begin][zadok_fert_stage_end] = 0
```
          on start_of_day:
          script: same as in Rotation Sample.paddock.Manager folder.wheat Fertilise in a zadok stage window
        irrigation
          automatic_irrigation = on
          asw_depth = 739.779256  # Depth to which ASW is calculated. (mm)
          crit_fr_asw = 0.650707  # Fraction of ASW below which irrigation is applied (0-1.0)
          irrigation_efficiency = 0.85  # Efficiency of the irrigation. (0-1.0)
          irrigation_allocation = off  # Allocation limits
          allocation = 0  # Allocation in mm
          default_no3_conc = 0  # Nitrate concentration (ppm N)
          default_nh4_conc = 0  # Ammonium concentration (ppm N)
          default_cl_conc = 0.0  # Chloride concentration (ppm Cl)
        fertiliser
        manager2 PaddockAccumulator (disabled)
```csharp
using System; 
using System.Collections.Generic;
using ModelFramework; 
using CSGeneral;

// This captures and accumulates the states of several paddock variables
// to be reported on a single report line. 

// Multi-paddock aware.

public class Script 
{ 
   [Link] public Simulation MySimulation;

   // Cumulative Ep
   [Output, Description("The total transpiration since the last transition"), Units("mm")] public double TEp {
      get {setup(); string s = currentPaddock() + "_Ep"; return(me[s]);}
   }
   // Cumulative rain
   [Output, Description("The total rain since the last transition"), Units("mm")] public double TRainfall {
      get {setup(); string s = currentPaddock() + "_rain"; return(me[s]);}
   }
   // Cumulative Drainage
   [Output, Description("The total drainage since the last transition"), Units("mm")] public double TDrainage {
      get {setup(); string s = currentPaddock() + "_drainage"; return(me[s]);}
   }
   // Cumulative Runoff
   [Output, Description("The total runoff since the last transition"), Units("mm")] public double TRunoff {
      get {setup(); string s = currentPaddock() + "_runoff"; return(me[s]);}
   }
   // Cumulative Es
   [Output, Description("The total soil evaporation since the last transition"), Units("mm")] public double TEs {
      get {setup(); string s = currentPaddock() + "_evaporation"; return(me[s]);}
   }
   // Cumulative fertiliser
   [Output, Description("The total fertiliser applied since the last transition"), Units("kg/ha")] public double applied_fert {
      get {setup(); string s = currentPaddock() + "_applied_fert"; return(me[s]);}
   }
   // Instantaneous sw at start
   [Output, Description("The soil water on the first day of a rotation"), Units("mm")] public double swStart {
      get {setup(); string s = currentPaddock() + "_swStart"; return(me[s]);}
   }
   // Instantaneous sw at end
   [Output, Description("The soil water on the last day of a rotation"), Units("mm")] public double swYesterday {
      get {setup(); string s = currentPaddock() + "_swYesterday"; return(me[s]);}
   }
   // Instantaneous no3 at start
   [Output, Description("The soil NO3 on the first day of a rotation"), Units("kg/ha")] public double no3Start {
      get {setup(); string s = currentPaddock() + "_no3Start"; return(me[s]);}
   }
   // Instantaneous no3 at end
   [Output, Description("The soil NO3 on the last day of a rotation"), Units("kg/ha")] public double no3Yesterday {
      get {setup(); string s = currentPaddock() + "_no3Yesterday"; return(me[s]);}
   }
   // Instantaneous carbon at end
   [Output, Description("The soil carbon on the last day of a rotation"), Units("kg/ha")] public double carbonYesterday {
      get {setup(); string s = currentPaddock() + "_carbon"; return(me[s]);}
   }
   // Instantaneous yield of all crops
   [Output, Description("Crop Yield"), Units("kg/ha")] public double yield_kgha {
      get{
         double yld2 = 0;
         Paddock p = (Paddock) MySimulation.LinkByName(currentPaddock());
         foreach (Component crop in p.Crops)
         {
            double yld = 0;
            crop.Get("yield", out yld);
            yld2 = yld2 + yld;
         }
         return yld2 ;}
   }
   // Instantaneous yield of all crops
   [Output, Description("Crop Yield"), Units("kg")] public double yield_kg {
      get{
         double yld2 = 0, area = 1.0;
         Paddock p = (Paddock) MySimulation.LinkByName(currentPaddock());
         MySimulation.Get(p.Name + ".area", out area);
         foreach (Component crop in p.Crops)
         {
            double yld = 0;
            crop.Get("yield", out yld);
            yld2 = yld2 + yld * area;
         }
         return yld2 ;}
   }
   // Instantaneous biomass of all crops
   [Output, Description("Crop biomass"), Units("kg/ha")] public double biomass_kgha {
      get{
         double biomass2 = 0;
         Paddock p = (Paddock) MySimulation.LinkByName(currentPaddock());
         foreach (Component crop in p.Crops)
         {
            double biomass = 0;
            crop.Get("biomass", out biomass);
            biomass2 = biomass2 + biomass;
         }
         return biomass2 ;}
   }
   // Instantaneous yield of all crops
   [Output, Description("Crop Biomass"), Units("kg")] public double biomass_kg {
      get{
         double biomass2 = 0, area = 1.0;
         Paddock p = (Paddock) MySimulation.LinkByName(currentPaddock());
         MySimulation.Get(p.Name + ".area", out area);
         foreach (Component crop in p.Crops)
         {
            double biomass = 0;
            crop.Get("biomass", out biomass);
            biomass2 = biomass2 + biomass * area;
         }
         return biomass2 ;}
   }
   // Instantaneous protein of all crops
   [Output, Description("Grain Protein"), Units("%")] public double protein {
      get{
         double pro2 = 0;
         Paddock p = (Paddock) MySimulation.LinkByName(currentPaddock());
         foreach (Component crop in p.Crops)
         {
            double pro = 0;
            crop.Get("grain_protein", out pro);
            pro2 = pro2 + pro;
         }
        
         return pro2 ;}
   }
   
   // Instantaneous N of all crops
   [Output, Description("Grain N"), Units("g/m2")] public double GrainN_gm2 {
      get{
         double GN2 = 0;
         Paddock p = (Paddock) MySimulation.LinkByName(currentPaddock());
         foreach (Component crop in p.Crops)
         {
            double GN = 0;
            if (crop.Get("grain_N", out GN))
               GN2 = GN2 + GN;
            else if (crop.Get("GrainGreenN", out GN))
               GN2 = GN2 + GN;
         }
         return GN2 ;}
   }
   
   
   [Output, Description("The state of the current paddock"), Units("")] public string paddockState {
      get {
         string cs = "";
         string cp = currentPaddock();
         MySimulation.Get(cp + "_state", out cs);
         return(cs);
      }
   }
   [Output, Description("The number of days in a rotation"), Units("")] public int daysInPhase {
      get {setup(); string s = currentPaddock() + "_daysInPhase"; return((int) me[s]);}
      set {}
   }
   
 
   private string currentPaddock() {
      string result = "";
      MySimulation.Get("currentPaddock", out result);
      if (result != "")
         return(result);
      else
         return(MySimulation.ChildPaddocks[0].Name);
   }


   // An accumulator for each thing in each paddock
   private Dictionary<string, double> me = new Dictionary<string, double>();

   private void setup() {
      if (me.Keys.Count == 0) { OnStart_Simulation(); }
   }
   
   [EventHandler] public void OnStart_Simulation() { 
      if (me.Keys.Count == 0) {
         foreach (Paddock paddock in MySimulation.ChildPaddocks) 
         {
            Component soil = (Component) paddock.LinkByType("soilwat");
            double [] swdep = new double[15];
            soil.Get("sw_dep", out swdep);
            me.Add(paddock.Name + "_swStart", MathUtility.Sum(swdep));
            me.Add(paddock.Name + "_swYesterday", MathUtility.Sum(swdep));
         
            Component soilN = (Component) paddock.LinkByType("soiln");
            double [] no3dep = new double[15];
            soilN.Get("no3", out no3dep);
            me.Add(paddock.Name + "_no3Start", MathUtility.Sum(no3dep));
            me.Add(paddock.Name + "_no3Yesterday", MathUtility.Sum(no3dep));
            me.Add(paddock.Name + "_rain", 0);
            me.Add(paddock.Name + "_Ep", 0);
            me.Add(paddock.Name + "_drainage", 0);
            me.Add(paddock.Name + "_runoff", 0);
            me.Add(paddock.Name + "_evaporation", 0);
            me.Add(paddock.Name + "_applied_fert", 0);
            double[] carbon = new double[15];
            soilN.Get("carbon_tot", out carbon);
            me.Add(paddock.Name + "_carbon", MathUtility.Sum(carbon));
            me.Add(paddock.Name + "_daysInPhase", 0);
         }
      }
   } 
   [EventHandler] public void OnTransition() {
      setup();   
      string s = currentPaddock();
      me[s + "_swStart"] = me[s+"_swYesterday"]; 
      me[s + "_no3Start"] = me[s + "_no3Yesterday"];
      me[s + "_Ep"] = 0;
      me[s + "_rain"] = 0;
      me[s + "_drainage"] = 0;
      me[s + "_runoff"] = 0;
      me[s + "_evaporation"] = 0;
      me[s + "_applied_fert"] = 0;
      me[s + "_carbon"] = 0;
      me[s + "_daysInPhase"] = 0;
   } 
   [EventHandler] public void OnPost() { 
      foreach (Paddock paddock in MySimulation.ChildPaddocks) 
      {
         Component soil = (Component) paddock.LinkByType("soilwat");
         Component soilN = (Component) paddock.LinkByType("soiln");
         Component fertiliser = (Component) paddock.LinkByType("fertiliser");
         double [] swdep = new double[15];
         soil.Get("sw_dep", out swdep);
         me[paddock.Name + "_swYesterday"] = MathUtility.Sum(swdep);

         double [] no3dep = new double[15];
         soilN.Get("no3", out no3dep);
         me[paddock.Name + "_no3Yesterday"] = MathUtility.Sum(no3dep);

         double drain = 0;
         soil.Get("drain", out drain);
         me[paddock.Name + "_drainage"] += drain;

         double runoff = 0;
         soil.Get("runoff", out runoff);
         me[paddock.Name + "_runoff"] += runoff;

         double es = 0;
         soil.Get("es", out es);
         me[paddock.Name + "_evaporation"] += es;

         double applied_fert = 0;
         fertiliser.Get("fertiliser", out applied_fert);
         me[paddock.Name + "_applied_fert"] += applied_fert;

         double[] carbon = new double[15];
         soilN.Get("carbon_tot", out carbon);
         me[paddock.Name + "_carbon"] = MathUtility.Sum(carbon);

         foreach (Component crop in paddock.Crops)
         {
            double Ep = 0.0;
            if(crop.Get("Ep", out Ep))
               me[paddock.Name + "_Ep"] += Ep;
         }
         double rain = 0;
         MySimulation.Get("rain", out rain);
         me[paddock.Name + "_rain"] += rain;

         me[paddock.Name + "_daysInPhase"]++;
      }
   }
}
```
        manager2 RotationCounter
```csharp
using System; 
using System.Collections.Generic;
using ModelFramework; 

// Counts the number of times a rotation has completed (ie gone back to the starting point)

// Multi-paddock aware.
public class Script 
{ 
   [Link] public Simulation MySimulation;   
   [Output, Description("Number of times the rotation has cycled"), Units("n")] public int rotationNumber {
      get {setup(); return(rotationNumberD[currentPaddock()]);}
      set {}
   }

   private Dictionary<string, int> rotationNumberD = new Dictionary<string, int>();
   private Dictionary<string, bool> needsCheck = new Dictionary<string, bool>();
   private Dictionary<string, string> initialState = new Dictionary<string, string>();
   private void setup() {
      if (initialState.Keys.Count == 0) { OnStart_Simulation(); }
   }
   
   [EventHandler] public void OnStart_Simulation() { 
      if (initialState.Keys.Count == 0) {
         foreach (Paddock paddock in MySimulation.ChildPaddocks) 
         {
            string s = "";
            if (MySimulation.Get(paddock.Name + "_state", out s)) {
               initialState.Add(paddock.Name, s);
            } else {
               MySimulation.Get("currentstate", out s);
               initialState.Add(paddock.Name, s);
            }
            needsCheck.Add(paddock.Name, false);
            rotationNumberD.Add(paddock.Name, 0);
         }
      }
   }    
 
   [EventHandler] public void OnPrepare() { foreach (Paddock paddock in MySimulation.ChildPaddocks) { needsCheck[paddock.Name] = false; }}
   [EventHandler] public void OnTransition() { needsCheck[currentPaddock()] = true; } 
   [EventHandler] public void OnPost() { 
      foreach (Paddock paddock in MySimulation.ChildPaddocks) {
         if (needsCheck[paddock.Name])  { 
            string currentState = ""; 
            if (!MySimulation.Get(paddock.Name + "_state", out currentState))
               MySimulation.Get("currentstate", out currentState);
            if (currentState == initialState[paddock.Name])  
               rotationNumberD[paddock.Name]++; 
         } 
      }
   } 
   private string currentPaddock() {
      string result = "";
      MySimulation.Get("currentPaddock", out result);
      if (result != "")
         return(result);
      else
         return(MySimulation.ChildPaddocks[0].Name);
   }
}
```
        tracker
          variable=count of clock.simulation_days on end_of_day from transition to now as days_in_stage
        manager wheat Fertilise in a zadok stage window2
          # When should fertiliser be applied
          zadok_fert_stage_begin = 15  # Enter start of zadok window (10-71)
          zadok_fert_stage_end = 17  # Enter end of zadok window (10-71)
          fert_criteria = 1000  # Don't add fertiliser if N in top 2 layers exceeds (kg/ha)
          esw_amount = 50  # Enter amount of soil water (mm)
          # Fertiliser application details
          fertmodule = maize  # Module used to apply the fertiliser
          fert_amount = 20  # Amount of fertiliser to apply (kg/ha)
          fert_type = urea_N  # Fertiliser type
          on init:
```
            fert_applied[zadok_fert_stage_begin][zadok_fert_stage_end] = 0
```
          on sowing:
```
            fert_applied[zadok_fert_stage_begin][zadok_fert_stage_end] = 0
```
          on start_of_day:
          script: same as in Rotation Sample.paddock.Manager folder.wheat Fertilise in a zadok stage window
      maize
      wheat
      outputfile Harvest: filename=Rotation Sample Harvest.out; title=Rotation Sample Harvest
        variables
          variables: dd/mm/yyyy as Date, yield, biomass
        events Reporting Frequency: event=harvesting
      outputfile Phases: filename=Rotation Sample Phases.out; title=Rotation Sample Phases
        variables
          variables: dd/mm/yyyy as Date, Rain as Rainfall, currentState, rotationNumber, simulation_days, sw_dep() as SoilWater, maize.Biomass as MaizeBio, wheat.Biomass as WheatBio, maize.Yield as MaizeYield, wheat.Yield as WheatYield, wheat.lai as wheatlai
        events Reporting Frequency
          events: transition, end_day, harvesting, harvesting
        RGraphics Rugplot Graph
```r
library(ggplot2)

apsim.input<- inputFiles 
aps1 <- read.table(apsim.input,skip=2,header=T) 
aps.name <- names(aps1)
df <- read.table(apsim.input,skip=3,header=T,col.names=aps.name,na.strings = "?")
df$Date<-as.Date(df$Date, format="%d/%m/%Y")

# sort out the beginning and ending dates of each phase
x1 <- df$Date[-1*nrow(df)]
x2 <- df$Date[-1] 
df <- df[-1,]  # throw away the first - it's from Start_Simulation
df$x1<-x1
df$x2<-x2

#lower bound of rectangles at bottom
df$ymin <- -0.25 * max(df$Yield)
 
jpeg(file=imageFileName, width=width, height=height)
g<- ggplot(df) +
 geom_bar(aes(x=Date, y=Yield, fill= currentState), stat="identity") +
 geom_rect(aes(xmin = x1 , xmax = x2, ymin= ymin, ymax=0, fill= currentState ) ) +
 scale_x_date() + scale_fill_discrete(name="state") + theme(
       axis.line = element_line(colour = "black"),
       panel.grid.major = element_blank(),
       panel.grid.minor = element_blank(),
       panel.border = element_blank(),
       panel.background = element_blank() )
print(g)

dev.off()
```
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